A := [2, 8, 5; 1, 10, 5; 9, 9, 3]
B := [5, 6, 6; 2, 8, 2; 2, 6, 3]
V1 := [8; 7; 2]
V2 := [5; 3; 4]
PView := [8; 7; 2]
C1 := A + B = [7, 14, 11; 3, 18, 7; 11, 15, 6]
C2 := A*B = [36, 106, 43; 35, 116, 41; 69, 144, 81]
D := A*V1 = [82; 88; 141]
q := transpose(V1)*V2 = 69
p := transpose(V1)*A*V2 = 985
VectorMult := V1×V2 = [22; -22; -11]
ScalarMult := V1*V2 = 69
ModVec := |V1| = 10.8167
CosV1V2 := V1*V2/(|V1|*|V2|) = 0.902134
SphereToCart := [PView[0]*sin(PView[2])*cos(PView[1]); PView[0]*sin(PView[2])*sin(PView[1]); PView[0]*cos(PView[2])] = [5.48417; 4.77917; -3.32917]
