# Координаты вершин в МСК:
Xa := -2
Xb := -3
Xc := 0
Xd := 3
Xe := 2
Xf := -2
Xg := 2
Ya := -4
Yb := 0
Yc := 4
Yd := 0
Ye := -4
Yf := 0
Yg := 0
Xlw := 100
Ylw := 200  # - левый верхний угол области отображения в ОСК
Xhw := 400
Yhw := 500  # - правый нижний угол области отображения в ОСК
Zx := transpose([Xa, Xb, Xc, Xd, Xe, Xf, Xg])
Zy := transpose([Ya, Yb, Yc, Yd, Ye, Yf, Yg])
Xl := min(Zx) = -3
Yh := max(Zy) = 4  # - левый верхний угол в МСК
Xh := max(Zx) = 3
Yl := min(Zy) = -4  # - правый нижний угол в МСК
# Вычисляем параметры, необходимые для формирования матрицы пересчета координат из МСК в ОСК
dXw := Xhw - Xlw = 300  # - ширина области отображения в ОСК
dX := Xh - Xl = 6  # - ширина области отображения в МСК
dYw := Yhw - Ylw = 300  # - высота области отображения в ОСК
dY := Yh - Yl = 8  # - высота области отображения в МСК
Kx := dXw/dX = 50
Ky := dYw/dY = 37.5
Tsw := [Kx, 0, Xlw - Kx*Xl; 0, -Ky, Yhw + Ky*Yl; 0, 0, 1]  # - матрица пересчета из МСК в ОСК
# Вычисляем координаты в ОСК
[Xaw; Yaw; q] := Tsw*[Xa; Ya; 1] = [150; 500; 1]  # - вершина А
[Xcw; Ycw; q] := Tsw*[Xc; Yc; 1] = [250; 200; 1]  # - вершина C
[Xbw; Ybw; q] := Tsw*[Xb; Yb; 1] = [100; 350; 1]  # - вершина В
[Xdw; Ydw; q] := Tsw*[Xd; Yd; 1] = [400; 350; 1]  # - вершина В
[Xew; Yew; q] := Tsw*[Xe; Ye; 1] = [350; 500; 1]  # - вершина E
[Xgw; Ygw; q] := Tsw*[Xg; Yg; 1] = [350; 350; 1]  # - вершина G
[Xfw; Yfw; q] := Tsw*[Xf; Yf; 1] = [150; 350; 1]  # - вершина F
X := transpose([Xb, Xc, Xd, Xb, Xf, Xa, Xe, Xg, Xd])
Xw := transpose([Xbw, Xcw, Xdw, Xbw, Xfw, Xaw, Xew, Xgw, Xdw])
Yw := -transpose([Ybw, Ycw, Ydw, Ybw, Yfw, Yaw, Yew, Ygw, Ydw])
Y := transpose([Yb, Yc, Yd, Yb, Yf, Ya, Ye, Yg, Yd])
# В мировой СК | В оконной СК
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